# OpenSim document version 40000
AnalyzeTool Muscle_Analysis_Normal_Gait:
  model_file: ../resources/Tutorial 4/gait2392.osim
  replace_force_set: false
  results_directory: MA_Normal_Gait_Results
  output_precision: 8
  initial_time: 0
  final_time: 1
  solve_for_equilibrium_for_auxiliary_states: true
  maximum_number_of_integrator_steps: 20000
  maximum_integrator_step_size: 1
  minimum_integrator_step_size: 1e-8
  integrator_error_tolerance: 1e-5
  coordinates_file: ../resources/Tutorial 4/normal_gait.mot
  lowpass_cutoff_frequency_for_coordinates: -1
  AnalysisSet Analyses:
    MuscleAnalysis: start_time=0 end_time=1 step_interval=1 in_degrees=true muscle_list=semiten_r
        moment_arm_coordinate_list=all compute_moments=true
